# Program: getconfig_nooverlaps.in
# Author: Rivaan Kakkaramadam
# Description: This simulation takes in the SREV configuration file generated by the SREV workflow outlined in Carignano et al., 2024,
# removes the SREV nucleosomes that are overlapping (that is, have particle centers that are within 9.8 nm of at least 1 other SREV nucleosome),
# and outputs an edited version of the SREV configuration that omits those overlapping SREV nucleosomes.

units lj
atom_style ellipsoid
region box block 0 10 0 10 0 10    # box is overwritten by reading dump file
create_box 2 box                   # Two atom types: 1) chrm 2) fluorophores

# read in the SREV config file originally generated using the workflow in Carignano et al., 2024

read_dump config-relaxed-5.dump 0 x y z add yes box yes

# read in the fluorophore input file

include walkerinput.in

set type 1 mass 3.0
set type 2 mass 1.0

set type 1 shape 1.0 1.0 0.5 # set the SREV nucleosome ellipsoid dimensions
set type 2 shape 1.0 1.0 1.0 # set the fluorophore ellipsoid (sphere) dimensions

# type 1 is SREV nucleosome ellipsoids; type 2 is the fluorophore spheres

group ellip type 1
group spher type 2

group big type 1 2

set group big quat/random 87287 # initialize the random orientations of all particles

# below lines dictate rules for interprocessor communication during sim. (sim. is big so defining this properly is needed)

comm_style tiled
comm_modify cutoff 3.0 mode single vel yes

balance 1.1 rcb

velocity spher create 2.50 87287 # initialize velocities of objects; all SREV nucleosomes must stay frozen
velocity ellip zero linear

fix freeze ellip setforce 0.0 0.0 0.0 # zero the forces acting on the SREV nucleosomes to keep them immobilized

pair_style gayberne 1.0 1.0 1.0 3.0 # used for specifying SREV-dye label & dye label-dye label interaction potentials
pair_coeff 1 1  1.0 1.0   1.7 1.7 3.4   0.0 0.0 0.0
pair_coeff 1 2  1.0 1.0   1.7 1.7 3.4   0.0 0.0 0.0
pair_coeff 2 2  1.0 1.0   1.7 1.7 1.7   0.0 0.0 0.0

# define how particles' list of neighbors are constructed -> important for simulation machinations

neighbor 0.7 bin
neigh_modify every 20 delay 0 check no

# below lines define temp of whole system

fix 1 all nvt temp 0.00466448 0.00466448 1.0
fix 2 all balance 500 1.1 rcb

delete_atoms overlap 0.98 ellip ellip # some SREV configs have overlaps despite MD repulsion sim; need to remove overlaps before label sim proceeds

compute         rot all temp/asphere
compute         0 all property/atom quatw quati quatj quatk shapex shapey shapez

compute		mTempRegularTemp spher temp
compute		mTAT spher temp/asphere

timestep 0.0005

thermo_style custom step temp c_mTempRegularTemp c_mTAT epair emol etotal press

thermo 100

dump 1 ellip custom 100 edited-config-5.dump id type x y z c_0[*] # output an edited version of the SREV configuration that omits any overlapping SREV nucleosomes
dump_modify 1 sort id

run 0 # technically this simulation runs for 0 timesteps; all that's needed is for the simulation to run the above commands once, which will occur at least at "timestep 0"
